*HEADING
 Units - kN, m, sec
**-------------Node----------------
*NODE, INPUT=model1_tri_node.dat, NSET=all
**------------Element--------------
*ELEMENT, INPUT=model1_tri_elem.dat,TYPE=S3R, ELSET=SHELL
*ELEMENT, INPUT=model1_tri_beam.dat, TYPE=T3D2, ELSET=CABLE
**-------------Node set----------------
*Nset, Nset=Fix
1, 4, 5, 10, 11, 21
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**-------------ELEMENT SET------------
*elset,elset=large
2104, 2105, 2106, 2107, 2108, 2109
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*elset,elset=small
2001, 2002, 2003, 2004, 2005, 2006
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**-------------ORIENTATION------------
*Orientation, name=spherical_large, system=spherical
-5,0,0,-5,0,1
*Orientation, name=spherical_small, system=spherical
6,0,0,6,0,1
**-------------Section----------------
*Shell Section, elset=large, material=membrane1,orientation=spherical_large
0.00005
*Shell Section, elset=small, material=Membrane2,orientation=spherical_small
0.00005
*SOLID Section, elset=CABLE, material=Steel
7.0e-05
**-------------Material----------------
*MATERIAL,NAME=Membrane1
*ELASTIC
8e05,0.3
*Expansion, type=ORTHO
0.0875,0.0875, 0
*MATERIAL,NAME=Membrane2
*ELASTIC
8e05, 0.3
*Expansion, type=ORTHO
0.04375,0.04375,0
*MATERIAL,NAME=Steel
*ELASTIC
1.373e08, 0.3
*NO COMPRESSION
*Expansion
0.002599
**-------------Boundary----------------
*BOUNDARY
Fix, 1, 3
**-------------INITIAL CONDITIONS------
*INITIAL CONDITION ,type=TEMPERATURE
all,0
**-------------------Step--------------
*STEP,INC=100,NLGEOM=No
*STATIC
0.1,1.0,0.01,0.1
*temperature
all,-1
*OUTPUT, FIELD, VARIABLE=all
*OUTPUT, HISTORY, VARIABLE=preselect, frequency=1
*END STEP
*STEP,INC=100,NLGEOM=No
*STATIC
0.1,1.0,0.01,0.1
*Dload
Shell, P, 1.0
*OUTPUT, FIELD, VARIABLE=all
*OUTPUT, HISTORY, VARIABLE=preselect, frequency=1
*END STEP
